// COMSOL Multiphysics 6.2.0.415 model "main_design.mph"
// Outline of the model tree

Parameters
  a = 1.0E-6
  r1 = 3.7E-7
  r2 = 3.5E-7
  x_min1 = 9.999999999999999E-6
  x_max1 = 1.6E-5
  y_min1 = 5.19615242270663E-6
  y_max1 = 8.66025403784439E-6
  x_min2 = 7.0E-6
  x_max2 = 1.8999999999999998E-5
  y_min2 = 2.59807621135332E-6
  y_max2 = 1.1258330249197699E-5
  x0 = 5.9999999999999985E-6
  y0 = 4.330127018922189E-6
  L_x = 1.2999999999999998E-5
  L_y = 9.660254037844379E-6
  D1x = 7.5E-7
  D1y = 4.330127018922193E-7

Geometry
  geom1 "Geometry 1" (2D, length unit m)
    r1: Rectangle "Background 2" | contributeto = csel4; base = center; size = {L_x, L_y}
    pol1: Polygon "Background 1"
      contributeto = csel3
      source = table
      table = 
        {x_min1-D1x-x_min2-x0, y_min1-D1y-y_min2-y0}
        {x_min1+5*a-D1x-x_min2-x0, y_min1-D1y-y_min2-y0}
        {x_max1+D1x-x_min2-x0, y_max1+D1y-y_min2-y0}
        {x_max1-5*a+D1x-x_min2-x0, y_max1+D1y-y_min2-y0}
    c11: Circle | contributeto = csel1; pos = {-3e-06, -1.73205080757e-06}; r = r1
    c12: Circle | contributeto = csel1; pos = {-2e-06, -1.73205080757e-06}; r = r1
    c13: Circle | contributeto = csel1; pos = {-1e-06, -1.73205080757e-06}; r = r1
    c14: Circle | contributeto = csel1; pos = {8.47032947254e-22, -1.73205080757e-06}; r = r1
    c15: Circle | contributeto = csel1; pos = {1e-06, -1.73205080757e-06}; r = r1
    c16: Circle | contributeto = csel1; pos = {-2.5e-06, -8.66025403784e-07}; r = r1
    c17: Circle | contributeto = csel1; pos = {-1.5e-06, -8.66025403784e-07}; r = r1
    c18: Circle | contributeto = csel1; pos = {-5e-07, -8.66025403784e-07}; r = r1
    c19: Circle | contributeto = csel1; pos = {5e-07, -8.66025403784e-07}; r = r1
    c110: Circle | contributeto = csel1; pos = {1.5e-06, -8.66025403784e-07}; r = r1
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    fin: Finalize "Form Union"

Materials
  mat2: Common "Background 2" on selection geom1_csel4_dom
    def "Basic"
      relpermittivity = 5.5
      relpermeability = 1
      electricconductivity = 0
  mat1: Common "Background 1" on selection geom1_csel3_dom
    def "Basic"
      relpermittivity = {1+0i, 0+0.4i, 0+0i, 0-0.4i, 1+0i, 0+0i, 0+0i, 0+0i, 1+0i}
      relpermeability = 1
      electricconductivity = 0
  mat3: Common "Rod 1" on selection geom1_csel1_dom
    def "Basic"
      relpermittivity = 14
      relpermeability = 1
      electricconductivity = 0
  mat4: Common "Rod 2" on selection geom1_csel2_dom
    def "Basic"
      relpermittivity = 1
      relpermeability = 1
      electricconductivity = 0

Physics
  ewfd: ElectromagneticWavesFrequencyDomain on all domains
    dependent variable E = {Ex, Ey, Ez}
    components.components = inplane
    wee1: WaveEquationElectric (default) | DisplacementFieldModel = RelativePermittivity
    pec1: PerfectElectricConductor (default)
    init1: init "Initial Values 1" (default)

Mesh
  mesh1 "Mesh 1"
    size: MeshSizeDefault | hmax = 8.71E-7; hmin = 3.9E-9; hcurve = 0.3; hgrad = 1.3
    size1: Size on selection geom1_csel1_dom | hmax = 6.89E-7; hmin = 3.9E-9; hcurve = 0.3; hgrad = 1.3; hauto = 4
    size2: Size on selection geom1_csel2_dom | hmax = 6.89E-7; hmin = 3.9E-9; hcurve = 0.3; hgrad = 1.3; hauto = 4
    ftri2: FreeTri "Free Triangular 2" on remaining entities | smoothmaxiter = 4; smoothmaxdepth = 4

Studies
  std1 "Study 1"
    eig: Eigenfrequency | eigunit = Hz; shift = 100000000000000; conrad = 1

Solver configurations
  sol1 "Solution 1" (study std1)
    v1: Variables "Dependent Variables 1"
    e1: Eigenvalue "Eigenvalue Solver 1"
      d1: Direct "Suggested Direct Solver (ewfd)"

Datasets
  dset1: Solution | solution = sol1

Derived values
  gev1: EvalGlobal "Eigenfrequencies (ewfd)" | data = dset1; table = tbl1; expr = {ewfd.freq, ewfd.Qfactor}
  gev2: EvalGlobal "Eigenfrequencies (ewfd) 1" | data = dset1; table = tbl2; expr = {ewfd.freq, ewfd.Qfactor}
  gev3: EvalGlobal "Eigenfrequencies (ewfd) 2" | data = dset1; table = tbl4; expr = {ewfd.freq, ewfd.Qfactor}
  gev4: EvalGlobal "Eigenfrequencies (ewfd) 3" | data = dset1; table = tbl5; expr = {ewfd.freq, ewfd.Qfactor}

Tables
  tbl1: Table
    Eigenfrequency (Hz) | Frequency (Hz) | Quality factor (1)
    9.93215e+13 | 9.93215e+13 | inf
    9.94899e+13 | 9.94899e+13 | inf
    9.97476e+13 | 9.97476e+13 | inf
    1.00263e+14 | 1.00263e+14 | inf
    1.0052e+14 | 1.0052e+14 | inf
    1.00749e+14 | 1.00749e+14 | inf
  tbl2: Table
    Eigenfrequency (Hz) | Frequency (Hz) | Quality factor (1)
    9.85115e+13+2.26446i | 9.85115e+13 | 2.17517e+13
    9.85395e+13-1.92596i | 9.85395e+13 | 2.55819e+13
    9.85926e+13-0.117606i | 9.85926e+13 | 4.19166e+14
    9.91012e+13-0.00159731i | 9.91012e+13 | 3.10213e+16
    9.99854e+13+0.00277828i | 9.99854e+13 | 1.79941e+16
    1.0057e+14-0.00830935i | 1.0057e+14 | 6.05164e+15
  tbl4: Table
    Eigenfrequency (Hz) | Frequency (Hz) | Quality factor (1)
    9.85115e+13+2.25818i | 9.85115e+13 | 2.18122e+13
    9.85395e+13-2.15014i | 9.85395e+13 | 2.29147e+13
    9.85926e+13-0.0823172i | 9.85926e+13 | 5.98858e+14
    9.91012e+13+0.0101205i | 9.91012e+13 | 4.89605e+15
    9.99854e+13+0.00218972i | 9.99854e+13 | 2.28306e+16
    1.0057e+14-0.0264487i | 1.0057e+14 | 1.90124e+15
  tbl5: Table
    Eigenfrequency (Hz) | Frequency (Hz) | Quality factor (1)
    9.85116e+13-9.36581i | 9.85116e+13 | 5.25911e+12
    9.85395e+13-0.591988i | 9.85395e+13 | 8.32276e+13
    9.85927e+13-0.0981408i | 9.85927e+13 | 5.02302e+14
    9.91013e+13+0.0228416i | 9.91013e+13 | 2.16932e+15
    9.99854e+13+0.000726447i | 9.99854e+13 | 6.8818e+16
    1.0057e+14-0.0113062i | 1.0057e+14 | 4.44759e+15

Plots
  pg1: PlotGroup2D "Electric Field (ewfd)" | data = dset1
    surf1: Surface | expr = ewfd.normE
  pg2: PlotGroup2D "Electric Field (ewfd) 1" | data = dset1
    surf1: Surface | expr = ewfd.normE
  pg3: PlotGroup2D "Electric Field (ewfd) 2" | data = dset1
    surf1: Surface | expr = ewfd.normE
  pg4: PlotGroup2D "Electric Field (ewfd) 3" | data = dset1
    surf1: Surface | expr = ewfd.normE