// COMSOL Multiphysics 6.2.0.415 model "main_design_qc3.mph"
// Outline of the model tree

Geometry
  geom1 "Geometry 1" (2D, length unit m)
    r1: Rectangle | contributeto = csel1; base = center; size = {8.706e-06, 9.0E-6}
    c1: Circle | contributeto = csel2; pos = {1.764E-6, 5.73E-7}; r = 1.3E-7
    c2: Circle | contributeto = csel2; pos = {2.436e-06, 3.54e-07}; r = 1.3E-7
    c3: Circle | contributeto = csel2; pos = {2.181E-6, 0}; r = 1.3E-7
    c4: Circle | contributeto = csel2; pos = {2.853E-6, 9.27E-7}; r = 1.3E-7
    c5: Circle | contributeto = csel2; pos = {2.853E-6, -2.19E-7}; r = 1.3E-7
    c6: Circle | contributeto = csel2; pos = {2.853E-6, -9.27E-7}; r = 1.3E-7
    c7: Circle | contributeto = csel2; pos = {1.089e-06, 3.54e-07}; r = 1.3E-7
    c8: Circle | contributeto = csel2; pos = {1.089e-06, -3.54e-07}; r = 1.3E-7
    c9: Circle | contributeto = csel2; pos = {6.75E-7, -2.19E-7}; r = 1.3E-7
    c10: Circle | contributeto = csel2; r = 1.3E-7
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    fin: Finalize "Form Union"

Materials
  mat1: Common "Material 1" on selection geom1_csel1_dom
    def "Basic"
      relpermittivity = {1+0i, 0+0.4i, 0+0i, 0-0.4i, 1+0i, 0+0i, 0+0i, 0+0i, 1+0i}
      relpermeability = 1
      electricconductivity = 0
  mat2: Common "Material 2" on selection geom1_csel2_dom
    def "Basic"
      relpermittivity = 14
      relpermeability = 1
      electricconductivity = 0

Physics
  ewfd: ElectromagneticWavesFrequencyDomain on all domains
    dependent variable E = {Ex, Ey, Ez}
    components.components = inplane
    wee1: WaveEquationElectric (default) | DisplacementFieldModel = RelativePermittivity
    pec1: PerfectElectricConductor (default)
    init1: init "Initial Values 1" (default)

Mesh
  mesh1 "Mesh 1" (physics-controlled)

Studies
  std1 "Study 1"
    eig: Eigenfrequency | eigunit = Hz; shift = 100000000000000; conrad = 1

Solver configurations
  sol1 "Solution 1" (study std1)
    v1: Variables "Dependent Variables 1"
    e1: Eigenvalue "Eigenvalue Solver 1"
      d1: Direct "Suggested Direct Solver (ewfd)"

Datasets
  dset1: Solution | solution = sol1